#echo		both
package gpu 4 gpuID 0 3 split 1.0
echo		log
units		real
neighbor	2.5 bin
#neigh_modify	every 3 delay 0 check yes page 100000000000
neigh_modify	every 2 delay 0 check yes page 2000000
atom_style	full
bond_style	harmonic
angle_style	sdk
pair_style      lj/sdk/coul/long/gpu    15.0
kspace_style    pppm/cg 1.0e-6
kspace_modify   order 5
dielectric      1.0

read_data       input_cc.lammps

bond_coeff	1 5.4 	3.4
bond_coeff	2 4.9  	3.28
bond_coeff	3 6.7  	2.65
bond_coeff	4 27.98 2.92
bond_coeff	5 22.1	2.56
bond_coeff	6 27.3 2.69
bond_coeff	7  50.0  3.0
bond_coeff	8  50.0  2.89
bond_coeff	9  50.0  2.57


# start with all velocities = 0
velocity	all zero linear

# set time = 0
timestep 	1.0


# output thermodynamic data
thermo_style 	custom step temp etotal evdwl ebond ecoul elong pxx pyy pzz lx ly lz
#thermo_style    multi
thermo_modify	flush yes
thermo 	        10000


#set pair coefficients
#pair_style lj/sdk 15.0

pair_coeff	* * lj12_4 0.895 4.371 15.0
pair_coeff 1 1 lj12_4	0.895 4.371 15.0
pair_coeff 1 2 lj12_4	0.57  4.31  15.0
pair_coeff 1 3 lj12_4	0.57  4.31  15.0
pair_coeff 1 4 lj12_4	0.70  3.95  15.0
#pair_coeff 1 5 lj9_6	0.290  4.2960  15.0
#pair_coeff 1 6 lj9_6	0.320  4.085  15.0
#pair_coeff 1 7 lj9_6	0.320  4.085  15.0
#pair_coeff 1 8 lj9_6	0.320  4.085  15.0
pair_coeff 1 5 lj9_6	0.250  4.085  15.0
pair_coeff 1 6 lj9_6	0.250  4.085  15.0
pair_coeff 1 7 lj9_6	0.250  4.085  15.0
pair_coeff 1 8 lj9_6	0.250  4.085  15.0
pair_coeff 1 9 lj9_6    0.560  4.371  15.0

pair_coeff 2 2 lj9_6	0.437  4.25  15.0
pair_coeff 2 3 lj9_6	0.42  4.25  15.0
pair_coeff 2 4 lj9_6	0.44  3.89  15.0

pair_coeff 2 5 lj9_6	0.369 4.24  15.0 #Change
pair_coeff 2 6 lj9_6	0.369 4.24  15.0 #Change
pair_coeff 2 7 lj9_6	0.369 4.24  15.0 #Change
pair_coeff 2 8 lj9_6	0.369 4.24  15.0 #Change
pair_coeff 2 9 lj9_6    0.391 4.31  15.0 #Change

pair_coeff 3 3 lj9_6	0.4050  4.25  15.0
pair_coeff 3 4 lj9_6	0.44  3.89  15.0

pair_coeff 3 5 lj9_6	0.355  4.24  15.0 #Change
pair_coeff 3 6 lj9_6	0.355  4.24  15.0 #Change
pair_coeff 3 7 lj9_6	0.355  4.24  15.0 #Change
pair_coeff 3 8 lj9_6	0.355  4.24  15.0 #Change
pair_coeff 3 9 lj9_6    0.396  4.31  15.0 #Change

pair_coeff 4 4 lj9_6	0.4491  3.713  15.0

pair_coeff 4 5 lj9_6	0.374   3.967  15.0 #Change
pair_coeff 4 6 lj9_6	0.374   3.967  15.0 #Change
pair_coeff 4 7 lj9_6	0.374   3.967  15.0 #Change
pair_coeff 4 8 lj9_6	0.374   3.967  15.0 #Change
pair_coeff 4 9 lj9_6    0.396   4.042  15.0 #Change

pair_coeff 5 5 lj9_6	0.312  4.2210  15.0 #BB
pair_coeff 5 6 lj9_6	0.312  4.2210  15.0 #BB
pair_coeff 5 7 lj9_6	0.312  4.2210  15.0 #BB
pair_coeff 5 8 lj9_6	0.312  4.2210  15.0 #BB
pair_coeff 5 9 lj9_6    0.330  4.2955  15.0 #BB
pair_coeff 6 6 lj9_6	0.312  4.2210  15.0 #BB
pair_coeff 6 7 lj9_6	0.312  4.2210  15.0 #BB
pair_coeff 6 8 lj9_6	0.312  4.2210  15.0 #BB
pair_coeff 6 9 lj9_6    0.330  4.2955  15.0 #BB

pair_coeff 7 7 lj9_6	0.312  4.2210  15.0 #BB
pair_coeff 7 8 lj9_6	0.312  4.2210  15.0 #BB
pair_coeff 7 9 lj9_6    0.330  4.2955  15.0 #BB

pair_coeff 8 8 lj9_6	0.312  4.2210  15.0 #BB
pair_coeff 8 9 lj9_6    0.330  4.2955  15.0 #BB

pair_coeff 9 9 lj9_6    0.350  4.3710  15.0 #BB

#fix             3 all nvt temp 300.0 300.0 400.0 drag 0.01
#fix             3 all npt temp 300.0 300.0 400.0 aniso 1.0 1.0 1000.0 pchain 6 tchain 6 drag .01
#fix             3 all npt temp 300.0 300.0 400.0 aniso 1.0 1.0 1000.0 couple xy
#fix 		3 all npt 300.0 300.0 400.0 aniso 1.0 1.0 1.0 1.0 1.0 1.0 1000.0 drag .01
fix 		3 all npt temp 300.0 300.0 400.0 aniso 1.0 1.0 1000.0

restart         10000 restart1 restart2
dump            dump2 all dcd 5000 warm1.dcd
dump_modify     dump2 unwrap yes

thermo          10000
log             therm_run1.dat


minimize 0.0 1.0e-8 1000   100000

timestep 	0.01
run		200000

timestep 	0.1
run		100000

timestep 	0.5
run		100000

#unfix		3
#fix 		3 all npt temp 300.0 300.0 400.0 aniso 1.0 1.0 1000.0
#fix             3 all npt temp 300.0 300.0 400.0 aniso 1.0 1.0 1000.0 couple xy
timestep 	1.0
run		100000

timestep 	2.5
run		100000

timestep 	5.0
run		100000

run_style      respa 2 10 bond 1 angle 1 pair 2
timestep 	10.0
run		5000000
